// SBML level 2 version 4

model m1()
  // m1

  // Compartments:
  compartment epi = 1;

  // Species:
  species IL17 in epi = 65.52;
  species T in epi = 4782.97;
  species GF in epi = 2271.06;
  species turnover in epi;
  species D in epi = 173,504.14;
  species totC in epi;
  species A in epi = 26.6;
  species A_per_1000 in epi;
  species UV in epi;
  species R in epi = 0;
  species totD in epi;
  species SC in epi = 12544.23;
  species TA in epi = 70349.64;
  species AdaT in epi = 0;
  species Bio in epi;
  species AdaSQ in epi = 80000;
  species TNF in epi = 65.53;
  species DC in epi = 4804.4;
  species IL23 in epi = 131.63;
  species UstSQ in epi = 45000;
  species UstT in epi = 0;
  species PASI in epi;
  species inflamm in epi;
  species thickness in epi;
  species desquam in epi;

  // Parameters:
  t20 = 1.51;
  il172 = 0.5;
  il1720 = 36.5;
  gf20 = 36.5;
  t_vm = 6000;
  t_kp = 3000000000000;
  d20 = 5.05e-7;
  ada20 = 0.1;
  d2a = 0;
  uv_dose = 0;
  a_time = 1;
  time_uvb = 300;
  uv_eff = 0.16;
  a_base = 0.0036;
  t_min = 1556.09;
  arrest = 0;
  r20 = 6e-7;
  sc2gf = 1;
  ta2gf = 1;
  sc_min = 3947.21;
  ta_min = 22224.4;
  a20 = 36;
  il_min = 52;
  ada2 = 0.05;
  tnf20 = 36.5;
  tnf2 = 0.5;
  var dc_act;
  dc_stim = 0;
  il232 = 1;
  il2320 = 36.5;
  t2 = 55;
  tnf_min = 28;
  ada2tnf = 0.01;
  n = 4;
  ust2 = 0.02;
  ust2il23 = 0.1;
  ust20 = 0.5;
  il23_min = 55;
  dc_min = 1563.06;
  sc2 = 0.0017635;
  ta2 = 0.0017562;
  sc2ta = 0.0015415;
  ta2d = 0.0018063;
  sc20 = 1.8135e-5;
  ta20 = 3.7321e-6;
  desq = 0.004752946;
  dc_stim_1 = 0;
  dc_stim_2 = 0;
  dc_stim_3 = 0;
  dc_stim_4 = 0;
  dc_stim_5 = 0;
  dc_stim_6 = 0;
  dc_stim_7 = 0;
  dc_stim_8 = 0;
  dc_stim_9 = 0;
  dc_stim_10 = 0;
  totC_min = 79828;
  totC_max = 266011.65;
  d_min = 50529.3;
  d_max = 173504;
  dc_max = 4804;
  t_max = 4783;
  m_h = 19; m_h is "mean_healthy";
  m_d = 0; m_d is "mean_dysregulated";
  s_h = 2; s_h is "sigma_healthy";
  s_d = 0; s_d is "sigma_dysregulated";

  // Assignment rules:
  turnover := (SC + TA)/(sc2*(IL17 + TNF)*SC + sc2ta*(IL17 + TNF)*SC + ta2*(IL17 + TNF)*TA) + D/(ta2d*(IL17 + TNF)*TA);
  totC := D + SC + TA + R + A + T + DC;
  A_per_1000 := 1000*(A/totC);
  UV := il1720 - 36.5;
  totD := D + R;
  Bio := ada2tnf*AdaT*(IL17 - il_min);
  PASI := ((totC - totC_min)/(totC_max - totC_min) + (T - t_min)/(t_max - t_min) + (D - d_min)/(d_max - d_min))/3;
  inflamm := (T - t_min)/(t_max - t_min);
  thickness := (totC - totC_min)/(totC_max - totC_min);
  desquam := (D - d_min)/(d_max - d_min);
  dc_act := RMSE = ∑ i = 1 100 ( 1 2 π s_d 2 ⁡ e - ( x i - m_d ) 2 2 s_d 2 - 1 2 π m_h 2 ⁡ e - ( x i - m_h ) 2 2 s_h 2 ) 2 100;

  // Reactions:
  reaction_3: IL23 => T + IL23; t2*IL23;
  reaction_4: T => ; t20*T;
  reaction_5: T => T + IL17; il172*T;
  reaction_6: IL17 => ; il1720*IL17;
  reaction_8: GF => ; gf20*GF;
  reaction_10: D => ; d20*D^2;
  reaction_12: T => A; uv_dose*uv_eff*(T - t_min) + a_base*T;
  reaction_13: A => ; a20*A;
  reaction_15: R => ; r20*R^2;
  reaction_16: SC => ; sc20*SC^2;
  reaction_17: TA => ; ta20*TA^2;
  reaction_18: SC + IL17 + TNF => 2 SC + IL17 + TNF; sc2*(IL17 + TNF)*SC;
  reaction_19: TA + IL17 + TNF => 2 TA + IL17 + TNF; ta2*(IL17 + TNF)*TA;
  reaction_20: SC => SC + GF; sc2gf*SC;
  reaction_21: TA => TA + GF; ta2gf*TA;
  reaction_22: SC => A; (1 - arrest)*uv_dose*uv_eff*(SC - sc_min) + a_base*SC;
  reaction_23: TA => A; (1 - arrest)*uv_dose*uv_eff*(TA - ta_min) + a_base*TA;
  reaction_24: TA => R; arrest*uv_dose*uv_eff*(TA - ta_min);
  reaction_25: SC => R; arrest*uv_dose*uv_eff*(SC - sc_min);
  reaction_11: AdaT => ; ada20*AdaT;
  reaction_14: AdaSQ => AdaT; ada2*AdaSQ;
  reaction_7: TNF => ; tnf20*TNF;
  reaction_26: T => T + TNF; tnf2*T;
  reaction_27: GF => DC + GF; t_vm*GF^n/(t_kp + GF^n);
  reaction_28: DC => ; t20*DC;
  reaction_29: => DC; dc_act + dc_stim;
  reaction_30: IL23 => ; il2320*IL23;
  reaction_31: DC => DC + IL23; il232*DC;
  reaction_32: UstSQ => UstT; ust2*UstSQ;
  reaction_33: UstT => ; ust20*UstT;
  reaction_35: DC => A; uv_dose*uv_eff*(DC - dc_min) + a_base*DC;
  reaction_36: SC => TA + SC; sc2ta*SC*(IL17 + TNF);
  reaction_37: TA => TA + D; ta2d*TA*(IL17 + TNF);
  reaction_38: D => A; a_base*D;
  reaction_39: D => ; desq*D;

  // Events:
  dose_1_a: at (time > time_uvb + 0): uv_dose = 0.7;
  dose_1_b: at (time >= time_uvb + 0 + a_time): uv_dose = 0;
  dose_2_a: at (time > time_uvb + 2): uv_dose = 0.7;
  dose_2_b: at (time >= time_uvb + 2 + a_time): uv_dose = 0;
  dose_3_a: at (time > time_uvb + 4): uv_dose = 0.98;
  dose_3_b: at (time >= time_uvb + 4 + a_time): uv_dose = 0;
  dose_4_a: at (time > time_uvb + 7): uv_dose = 0.98;
  dose_4_b: at (time >= time_uvb + 7 + a_time): uv_dose = 0;
  dose_5_a: at (time > time_uvb + 9): uv_dose = 1.323;
  dose_5_b: at (time >= time_uvb + 9 + a_time): uv_dose = 0;
  dose_6_a: at (time > time_uvb + 11): uv_dose = 1.323;
  dose_6_b: at (time >= time_uvb + 11 + a_time): uv_dose = 0;
  dose_7_a: at (time > time_uvb + 14): uv_dose = 1.72;
  dose_7_b: at (time >= time_uvb + 14 + a_time): uv_dose = 0;
  dose_8_a: at (time > time_uvb + 16): uv_dose = 1.72;
  dose_8_b: at (time >= time_uvb + 16 + a_time): uv_dose = 0;
  dose_9_a: at (time > time_uvb + 18): uv_dose = 2.15;
  dose_9_b: at (time >= time_uvb + 18 + a_time): uv_dose = 0;
  dose_10_a: at (time > time_uvb + 21): uv_dose = 2.15;
  dose_10_b: at (time >= time_uvb + 21 + a_time): uv_dose = 0;
  dose_11_a: at (time > time_uvb + 23): uv_dose = 2.58;
  dose_11_b: at (time >= time_uvb + 23 + a_time): uv_dose = 0;
  dose_12_a: at (time > time_uvb + 25): uv_dose = 2.58;
  dose_12_b: at (time >= time_uvb + 25 + a_time): uv_dose = 0;
  dose_13_a: at (time > time_uvb + 28): uv_dose = 2.967;
  dose_13_b: at (time >= time_uvb + 28 + a_time): uv_dose = 0;
  dose_14_a: at (time > time_uvb + 30): uv_dose = 2.967;
  dose_14_b: at (time >= time_uvb + 30 + a_time): uv_dose = 0;
  dose_15_a: at (time > time_uvb + 32): uv_dose = 3.264;
  dose_15_b: at (time >= time_uvb + 32 + a_time): uv_dose = 0;
  dose_16_a: at (time > time_uvb + 35): uv_dose = 3.264;
  dose_16_b: at (time >= time_uvb + 35 + a_time): uv_dose = 0;
  dose_17_a: at (time > time_uvb + 37): uv_dose = 3.427;
  dose_17_b: at (time >= time_uvb + 37 + a_time): uv_dose = 0;
  dose_18_a: at (time > time_uvb + 39): uv_dose = 3.427;
  dose_18_b: at (time >= time_uvb + 39 + a_time): uv_dose = 0;
  dose_19_a: at (time > time_uvb + 42): uv_dose = 3.427;
  dose_19_b: at (time >= time_uvb + 42 + a_time): uv_dose = 0;
  dose_20_a: at (time > time_uvb + 44): uv_dose = 3.427;
  dose_20_b: at (time >= time_uvb + 44 + a_time): uv_dose = 0;
  dose_21_a: at (time > time_uvb + 46): uv_dose = 3.427;
  dose_21_b: at (time >= time_uvb + 46 + a_time): uv_dose = 0;
  dose_22_a: at (time > time_uvb + 49): uv_dose = 3.427;
  dose_22_b: at (time >= time_uvb + 49 + a_time): uv_dose = 0;
  dose_23_a: at (time > time_uvb + 51): uv_dose = 3.427;
  dose_23_b: at (time >= time_uvb + 51 + a_time): uv_dose = 0;
  dose_24_a: at (time > time_uvb + 53): uv_dose = 3.427;
  dose_24_b: at (time >= time_uvb + 53 + a_time): uv_dose = 0;
  dose_25_a: at (time > time_uvb + 56): uv_dose = 3.427;
  dose_25_b: at (time >= time_uvb + 56 + a_time): uv_dose = 0;
  event_13: at (time >= 150): dc_stim = 3000;
  event_14: at (time >= 154): dc_stim = 0;
end
